# OpenSim document version 40500
InverseKinematicsTool walking1:
  results_directory: Y:\Users\EMiller\GHRepos_For_Publication\temp_ik_testing
  model_file: Y:\Users\EMiller\GHRepos_For_Publication\temp_ik_testing\scaled_RagagopalArmless.osim
  constraint_weight: Inf
  accuracy: 1e-5
  time_range: 0 1.31
  output_motion_file: Y:\Users\EMiller\GHRepos_For_Publication\temp_ik_testing\ReplaceAll_ik.sto
  report_errors: true
  marker_file: Y:\Users\EMiller\GHRepos_For_Publication\temp_ik_testing\MarkerData_optfeet_walking1_videoAndMocap.trc
  report_marker_locations: true
  IKTaskSet:
    IKMarkerTask C7: apply=true weight=5
    IKMarkerTask R_Shoulder: apply=true weight=5
    IKMarkerTask L_Shoulder: apply=true weight=5
    IKMarkerTask Sternum: apply=true weight=5
    IKMarkerTask r.ASIS: apply=true weight=10
    IKMarkerTask L.ASIS: apply=true weight=10
    IKMarkerTask r.PSIS: apply=true weight=10
    IKMarkerTask L.PSIS: apply=true weight=10
    IKMarkerTask r_thigh1: apply=true weight=4
    IKMarkerTask r_thigh2: apply=true weight=4
    IKMarkerTask r_thigh3: apply=true weight=4
    IKMarkerTask r_thigh4: apply=true weight=4
    IKMarkerTask r_thigh5: apply=true weight=4
    IKMarkerTask r_knee: apply=true weight=20
    IKMarkerTask r_mknee: apply=false weight=1
    IKMarkerTask r_shank_antsup: apply=true weight=5
    IKMarkerTask r_sh2: apply=true weight=5
    IKMarkerTask r_sh3: apply=true weight=5
    IKMarkerTask r_sh4: apply=true weight=5
    IKMarkerTask r_ankle: apply=true weight=20
    IKMarkerTask r_mankle: apply=false weight=1
    IKMarkerTask r_toe: apply=true weight=7
    IKMarkerTask r_5meta: apply=true weight=7
    IKMarkerTask r_calc: apply=true weight=7
    IKMarkerTask L_thigh1: apply=true weight=5
    IKMarkerTask L_thigh2: apply=true weight=5
    IKMarkerTask L_thigh3: apply=true weight=5
    IKMarkerTask L_thigh4: apply=true weight=5
    IKMarkerTask L_knee: apply=true weight=20
    IKMarkerTask L_mknee: apply=false weight=1
    IKMarkerTask L_ankle: apply=true weight=20
    IKMarkerTask L_shank_antsup: apply=true weight=7
    IKMarkerTask L_sh2: apply=true weight=7
    IKMarkerTask L_sh3: apply=true weight=7
    IKMarkerTask L_mankle: apply=false weight=1
    IKMarkerTask L_toe: apply=true weight=7
    IKMarkerTask L_calc: apply=true weight=7
    IKMarkerTask L_5meta: apply=true weight=7
    IKMarkerTask midASIS: apply=false weight=1
    IKMarkerTask R_5meta_proj: apply=false weight=1
    IKMarkerTask L_5meta_proj: apply=false weight=1
    IKMarkerTask R_toe_proj: apply=false weight=1
    IKMarkerTask L_toe_proj: apply=false weight=1
    IKMarkerTask L_AJC: apply=false weight=1
    IKMarkerTask L_AJC_proj: apply=false weight=1
    IKMarkerTask L_KJC: apply=false weight=1
    IKMarkerTask R_AJC: apply=false weight=1
    IKMarkerTask R_AJC_proj: apply=false weight=1
    IKMarkerTask R_KJC: apply=false weight=1
    IKMarkerTask midHJC: apply=false weight=1
    IKMarkerTask midPelvis: apply=false weight=1
    IKMarkerTask midPSIS: apply=false weight=1
