# OpenSim document version 40500
InverseKinematicsTool:
  time_range: 0 1.31
  output_motion_file: ../../../../../../../../OpenSim 4.5/test_ik.mot
  marker_file: walking1_markerdata.trc
  IKTaskSet:
    IKMarkerTask r.ASIS: apply=true weight=10
    IKMarkerTask L.ASIS: apply=true weight=10
    IKMarkerTask r.PSIS: apply=true weight=10
    IKMarkerTask L.PSIS: apply=true weight=10
    IKMarkerTask r_knee: apply=true weight=20
    IKMarkerTask r_mknee: apply=false weight=1
    IKMarkerTask r_ankle: apply=true weight=20
    IKMarkerTask r_mankle: apply=false weight=1
    IKMarkerTask r_toe: apply=true weight=7
    IKMarkerTask r_5meta: apply=true weight=7
    IKMarkerTask r_calc: apply=true weight=7
    IKMarkerTask L_knee: apply=true weight=20
    IKMarkerTask L_mknee: apply=false weight=1
    IKMarkerTask L_ankle: apply=true weight=20
    IKMarkerTask L_mankle: apply=false weight=1
    IKMarkerTask L_toe: apply=true weight=7
    IKMarkerTask L_calc: apply=true weight=7
    IKMarkerTask L_5meta: apply=true weight=7
    IKMarkerTask R_Shoulder: apply=true weight=5
    IKMarkerTask L_Shoulder: apply=true weight=5
    IKMarkerTask C7: apply=true weight=5
    IKMarkerTask r_lelbow: apply=true weight=1
    IKMarkerTask r_melbow: apply=false weight=1
    IKMarkerTask r_lwrist: apply=true weight=1
    IKMarkerTask r_mwrist: apply=false weight=1
    IKMarkerTask L_lelbow: apply=true weight=1
    IKMarkerTask L_melbow: apply=false weight=1
    IKMarkerTask L_lwrist: apply=true weight=1
    IKMarkerTask L_mwrist: apply=false weight=1
    IKMarkerTask r_thigh1: apply=true weight=5
    IKMarkerTask r_thigh2: apply=true weight=5
    IKMarkerTask r_thigh3: apply=true weight=5
    IKMarkerTask L_thigh1: apply=true weight=5
    IKMarkerTask L_thigh2: apply=true weight=5
    IKMarkerTask L_thigh3: apply=true weight=5
    IKMarkerTask r_sh1: apply=true weight=7
    IKMarkerTask r_sh2: apply=true weight=7
    IKMarkerTask r_sh3: apply=true weight=7
    IKMarkerTask L_sh1: apply=true weight=7
    IKMarkerTask L_sh2: apply=true weight=7
    IKMarkerTask L_sh3: apply=true weight=7
    IKMarkerTask R_HJC: apply=true weight=1
    IKMarkerTask L_HJC: apply=true weight=1
