# OpenSim document version 40500
ScaleTool ArmlessRajagopal-scaled_OC:
  mass: 60 [kg]
  height: 1600
  age: -1
  ModelScaler:
    apply: true
    scaling_order: measurements
    marker_file: LabValidation_withVideos/subject10/EYM_GRF_Project/TRC_Files/OpenCap_static1.trc
    time_range: 0 6.42
    preserve_mass_distribution: true
    MeasurementSet:
      Measurement foot: apply=true
        MarkerPair: markers=(r_calc r_toe)
        MarkerPair: markers=(r_calc r_5meta)
        MarkerPair: markers=(L_calc L_toe)
        MarkerPair: markers=(L_calc L_5meta)
        BodyScale talus_r: axes=(X Y Z)
        BodyScale calcn_r: axes=(X Y Z)
        BodyScale toes_r: axes=(X Y Z)
        BodyScale talus_l: axes=(X Y Z)
        BodyScale calcn_l: axes=(X Y Z)
        BodyScale toes_l: axes=(X Y Z)
      Measurement tibia_r: apply=true
        MarkerPair: markers=(r_knee r_ankle)
        MarkerPair: markers=(r_mknee r_mankle)
        BodyScale tibia_r: axes=(X Y Z)
      Measurement femur_r: apply=true
        MarkerPair: markers=(R_HJC r_knee)
        BodyScale femur_r: axes=(X Y Z)
        BodyScale patella_r: axes=(X Y Z)
      Measurement tibia_l: apply=true
        MarkerPair: markers=(L_knee L_ankle)
        MarkerPair: markers=(L_mknee L_mankle)
        BodyScale tibia_l: axes=(X Y Z)
      Measurement femur_l: apply=true
        MarkerPair: markers=(L_HJC L_knee)
        BodyScale femur_l: axes=(X Y Z)
        BodyScale patella_l: axes=(X Y Z)
      Measurement pelvisXY: apply=true
        MarkerPair: markers=(r.ASIS r.PSIS)
        MarkerPair: markers=(L.ASIS L.PSIS)
        BodyScale pelvis: axes=(X Y)
      Measurement pelvisZ: apply=true
        MarkerPair: markers=(R_HJC L_HJC)
        BodyScale pelvis: axes=Z
      Measurement torsoXY: apply=true
        MarkerPair: markers=(R_Shoulder r.PSIS)
        MarkerPair: markers=(L_Shoulder L.PSIS)
        MarkerPair: markers=(C7 r.PSIS)
        MarkerPair: markers=(C7 L.PSIS)
        BodyScale torso: axes=(X Y)
      Measurement torsoZ: apply=true
        MarkerPair: markers=(R_Shoulder L_Shoulder)
        BodyScale torso: axes=Z
  MarkerPlacer:
    apply: true
    marker_file: LabValidation_withVideos/subject10/EYM_GRF_Project/TRC_Files/OpenCap_static1.trc
    time_range: 0 0.25
    output_model_file: LabValidation_withVideos/subject10/EYM_GRF_Project/Rescaled_Models/scaled_noArms_OC.osim
    max_marker_movement: -1
    IKTaskSet:
      IKMarkerTask C7: apply=true weight=10
      IKMarkerTask R_Shoulder: apply=true weight=0
      IKMarkerTask L_Shoulder: apply=true weight=0
      IKMarkerTask r.ASIS: apply=true weight=10
      IKMarkerTask L.ASIS: apply=true weight=10
      IKMarkerTask r.PSIS: apply=true weight=10
      IKMarkerTask L.PSIS: apply=true weight=10
      IKMarkerTask R_HJC: apply=true weight=20
      IKMarkerTask L_HJC: apply=true weight=20
      IKMarkerTask r_thigh1: apply=true weight=0
      IKMarkerTask r_thigh2: apply=true weight=0
      IKMarkerTask r_thigh3: apply=true weight=0
      IKMarkerTask r_knee: apply=true weight=10
      IKMarkerTask r_mknee: apply=true weight=10
      IKMarkerTask r_sh2: apply=true weight=0
      IKMarkerTask r_sh3: apply=true weight=0
      IKMarkerTask r_ankle: apply=true weight=10
      IKMarkerTask r_mankle: apply=true weight=10
      IKMarkerTask r_toe: apply=true weight=10
      IKMarkerTask r_5meta: apply=true weight=10
      IKMarkerTask r_calc: apply=true weight=10
      IKMarkerTask L_thigh1: apply=true weight=0
      IKMarkerTask L_thigh2: apply=true weight=0
      IKMarkerTask L_thigh3: apply=true weight=0
      IKMarkerTask L_knee: apply=true weight=10
      IKMarkerTask L_mknee: apply=true weight=10
      IKMarkerTask L_ankle: apply=true weight=10
      IKMarkerTask L_sh2: apply=true weight=0
      IKMarkerTask L_sh3: apply=true weight=0
      IKMarkerTask L_mankle: apply=true weight=10
      IKMarkerTask L_toe: apply=true weight=10
      IKMarkerTask L_calc: apply=true weight=10
      IKMarkerTask L_5meta: apply=true weight=10
      IKMarkerTask L_AJC: apply=false weight=20
      IKMarkerTask L_KJC: apply=false weight=20
      IKMarkerTask R_AJC: apply=false weight=10
      IKMarkerTask R_KJC: apply=false weight=20
      IKCoordinateTask knee_angle_r: apply=true weight=30 value_type=default_value value=0
      IKCoordinateTask knee_angle_l: apply=true weight=30 value_type=default_value value=0
